<?xml version="1.0"?>
<!--

Based on tables from JavaProp.

JavaProp design tweaked with:

Increase cord 200mm
taper chord 0.4

The above makes the JavaProp designed propeller look a lot like
a P-51D prop.

Desity p: 0.45726 kg/m^2  (26000 ft)
Speed of sound 308 m/s

Velocity v = 195.8 m/s

power = 1051000 Watts (1410 HP)

This is 438 MPH at 26000 ft at 67 inHg and 3000 RPM.

MH airfoils - beta 3 degrees at all stations.

The JavaProp designed prop tables were tweaked in a spread sheet until
the aircraft performed to published data.

JavaProp calculated the optimal blade angle at the design point at
54.6 degrees.  In flightGear at 26000 ft and 61 inHg and 3000 RPM
the P-51D will reach 376 knots with a blade angle of 54.8 degrees.
Close enough.

JavaProp only generates values for advance ratios that
have positive numbers and stops after the first few negative
values.  Linear interpolation was used for the remaining
negative coefficients.

Gear ratio is 2.38 for the V-1650-7 (derived from Merlin 61)

"I believe that 0.42 is correct for the V-1650-7 since a lower ratio would
result in lower prop tip speeds and for faster the aircraft this will allow
for more of the speed envelope to be below a prop tip speed of 1000 FPM which
is the point where efficiency starts to drop off." - Hal V. Engel [1]

Propeller pitch range is 42 deg (23 to 65 deg) (page 16 of P-51 training
manual AAF MANUAL 51-127-5)

[1] https://ww2aircraft.net/forum/threads/p-51d-propeller-technical-data-request.24166/

-->

<propeller name="prop">
  <!-- <ixx>23.6164 </ixx> -->
  <ixx>50</ixx>
  <diameter unit="IN">138.0 </diameter>
  <numblades> 4 </numblades>
  <gearratio>2.38</gearratio>
  <minpitch>23</minpitch>
  <maxpitch>58</maxpitch>
  <minrpm>756</minrpm> <!-- 1800 to 3000 engine RPM -->
  <maxrpm>1260</maxrpm>
  <ct_factor> 1.0 </ct_factor>
  <cp_factor> 1.0 </cp_factor>

  <table name="C_THRUST" type="internal">
      <tableData>
    23  28  33  38  43  48  53  58
0.0 0.299030    0.260805    0.242449    0.231525    0.204085    0.186000    0.166529    0.151091
0.3 0.263037    0.260598    0.243941    0.224403    0.187718    0.159398    0.127234    0.101877
0.6 0.228691    0.241664    0.251021    0.243598    0.209924    0.182990    0.153492    0.126141
0.9 0.138625    0.187720    0.231441    0.251876    0.228605    0.206843    0.177506    0.149456
1.2 0.035081    0.109034    0.174273    0.232255    0.237158    0.224925    0.202759    0.176512
1.5 -0.075277   0.022156    0.102570    0.175581    0.221133    0.236100    0.220572    0.203352
1.8 -0.185636   -0.069235   0.025197    0.110838    0.173688    0.225598    0.235643    0.222331
2.1 -0.295994   -0.160625   -0.055893   0.041913    0.121150    0.187718    0.232067    0.242047
2.4 -0.406353   -0.252016   -0.136984   -0.030783   0.065853    0.144771    0.207194    0.245622
2.7 -0.516711   -0.343406   -0.218075   -0.103986   0.007654    0.099844    0.126188    0.237363
3.0 -0.627070   -0.434797   -0.299165   -0.177189   -0.052552   0.052866    0.089335    0.211044
3.3 -0.737428   -0.526187   -0.380256   -0.250391   -0.112758   0.003797    0.051019    0.183698
3.6 -0.847787   -0.617578   -0.461347   -0.323594   -0.172965   -0.046655   0.011260    0.155477
3.9 -0.958145   -0.708968   -0.542438   -0.396797   -0.233171   -0.097107   -0.029834   0.126304
4.2 -1.068503   -0.800359   -0.623528   -0.470000   -0.293377   -0.147560   -0.070935   0.096179
4.5 -1.178862   -0.891749   -0.704619   -0.543203   -0.353583   -0.198012   -0.112036   0.065141
4.8 -1.289220   -0.983140   -0.785710   -0.616406   -0.413790   -0.248464   -0.153137   0.032939
5.1 -1.399579   -1.074530   -0.866800   -0.689609   -0.473996   -0.298916   -0.194238   0.000589
5.4 -1.509937   -1.165921   -0.947891   -0.762811   -0.534202   -0.349368   -0.235339   -0.031761
5.5 -1.546723   -1.196384   -0.974921   -0.787212   -0.554271   -0.366186   -0.249039   -0.042544
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      </tableData>
  </table>

  <table name="C_POWER" type="internal">
     <tableData>
    23  28  33  38  43  48  53  58
0.0 0.187957    0.248661    0.324321    0.391990    0.470088    0.560034    0.662333    0.775476
0.3 0.180741    0.238391    0.297399    0.360777    0.436975    0.501981    0.518789    0.500748
0.6 0.172309    0.233285    0.290292    0.356131    0.412256    0.491984    0.574561    0.588421
0.9 0.119570    0.199263    0.279342    0.344706    0.414226    0.467518    0.543742    0.638911
1.2 0.040417    0.128207    0.225413    0.326289    0.401255    0.474439    0.528667    0.600913
1.5 -0.047478   0.036292    0.142370    0.257218    0.376423    0.460563    0.536081    0.592122
1.8 -0.139045   -0.069202   0.053100    0.199113    0.354426    0.511329    0.616529    0.705595
2.1 -0.240250   -0.186366   -0.071227   0.100725    0.295975    0.501235    0.694818    0.818669
2.4 -0.351093   -0.315200   -0.208645   -0.041279   0.198584    0.453943    0.719415    0.937907
2.7 -0.471575   -0.455704   -0.359152   -0.202118   0.055607    0.370588    0.581754    1.033121
3.0 -0.601695   -0.607878   -0.522749   -0.377775   -0.126708   0.245630    0.487406    1.053549
3.3 -0.741453   -0.771722   -0.699436   -0.568250   -0.325505   0.073539    0.352789    1.048972
3.6 -0.890849   -0.947237   -0.889213   -0.773543   -0.540786   -0.138495   0.173582    1.016608
3.9 -1.049883   -1.134421   -1.092080   -0.993654   -0.772550   -0.368140   -0.050966   0.952620
4.2 -1.218556   -1.333276   -1.308037   -1.228583   -1.020797   -0.615396   -0.296695   0.853470
4.5 -1.396866   -1.543801   -1.537084   -1.478331   -1.285527   -0.880264   -0.560862   0.715932
4.8 -1.584815   -1.765997   -1.779221   -1.742896   -1.566741   -1.162742   -0.843468   0.537333
5.1 -1.782402   -1.999862   -2.034448   -2.022279   -1.864438   -1.462832   -1.144513   0.340639
5.4 -1.989627   -2.245397   -2.302765   -2.316481   -2.178618   -1.780533   -1.463997   0.129297
5.5 -2.060844   -2.329836   -2.395113   -2.417841   -2.287008   -1.890347   -1.574589   0.055595
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     </tableData>
  </table>

<!-- thrust effects of helical tip Mach -->
<table name="CT_MACH" type="internal">
  <tableData>
    0.85   1.0
    1.05   0.8
  </tableData>
</table>

<!-- power-required effects of helical tip Mach -->
<table name="CP_MACH" type="internal">
  <tableData>
    0.85   1.0
    1.05   1.8
    2.00   1.4
  </tableData>
</table>

</propeller>
