<?xml version="1.0"?>

<!--

Modified version of what was originally in FlightGear CVS.  This has
been extensively modified by:

Hal V. Engel hvengel@astound.net

-->
<!-- In test, working file dany93. Some changes on stall and spin departure for takeoff and landing, spiraling propwash effect. 30 Nov 2015 -->

<!--
     Control surfaces:
       - ailerons: 10, 12, or 15 deg
       - flaps: 47 deg
       - elevator:
           - up: 30 deg
           - down: 20 deg
       - rudder: 30 deg

     Trim tabs:
       - ailerons: 10 deg
       - elevator:
           - up: 10 deg
           - down: 25 deg
       - rudder: 10 deg
-->

<?xml-stylesheet type="text/xsl" href="http://jsbsim.sourceforge.net/JSBSim.xsl"?>
<fdm_config name="P-51D (JSBSim)" version="2.0" release="BETA"
    xmlns:xsi="http://www.w3.org/2001/XMLSchema-instance"
    xsi:noNamespaceSchemaLocation="http://jsbsim.sourceforge.net/JSBSim.xsd">

    <fileheader>
        <author> Aeromatic / Jon Berndt / DATCOM / Hal V. Engel</author>
        <filecreationdate> 2001-01-01 </filecreationdate>
        <version> $Revision: 1.16 $ </version>
        <description> Advanced model of P-51D fighter </description>
    </fileheader>

    <metrics>
        <wingarea unit="FT2"> 235 </wingarea>
        <wingspan unit="FT"> 37.1 </wingspan>
        <wing_incidence unit="DEG"> 1.00 </wing_incidence>
        <chord unit="FT"> 6.6 </chord>
        <htailarea unit="FT2"> 41 </htailarea>
        <htailarm unit="FT"> 15 </htailarm>
        <vtailarea unit="FT2"> 20 </vtailarea>
        <vtailarm unit="FT"> 15 </vtailarm>
        <location name="AERORP" unit="IN">
            <x> 99 </x>
            <y> 0 </y>
            <z> -26.5 </z>
        </location>
        <location name="EYEPOINT" unit="IN">
            <x> 95 </x>
            <y> 0 </y>
            <z> 30 </z>
        </location>
        <location name="VRP" unit="IN">
            <x> 0 </x>
            <y> 0 </y>
            <z> 0 </z>
        </location>
    </metrics>

    <mass_balance>
        <ixx unit="SLUG*FT2"> 8031 </ixx>
        <iyy unit="SLUG*FT2"> 9274 </iyy>
        <izz unit="SLUG*FT2"> 14547 </izz>
        <emptywt unit="LBS"> 7125 </emptywt>
        <location name="CG" unit="IN">
            <x> 98 </x>
            <y> 0 </y>
            <z> -9 </z>
        </location>
        <pointmass name="pilot">
            <weight unit="LBS"> 180 </weight>
            <location name="POINTMASS" unit="IN">
                <x> 98 </x>
                <y> 0 </y>
                <z> 15 </z>
            </location>
        </pointmass>

         <!-- each 50 cal bullet is a little less than 180 grams but with links are
      probably close to 180 gram each.  The inner two guns can have up to 400
      rounds each and the outer 4 guns can be loaded with up to 270 rounds each. -->

      <pointmass name="Ammo right inner gun">
            <weight unit="LBS"> 0 </weight>
            <location name="POINTMASS" unit="IN">
                <x> 100 </x>
                <y> -79.2</y>
                <z> -19.2 </z>
            </location>
        </pointmass>
        <pointmass name="Ammo left inner gun">
            <weight unit="LBS"> 0 </weight>
            <location name="POINTMASS" unit="IN">
                <x> 100 </x>
                <y> 79.2</y>
                <z> -19.2 </z>
            </location>
        </pointmass>

        <pointmass name="Ammo right middle gun">
            <weight unit="LBS"> 0 </weight>
            <location name="POINTMASS" unit="IN">
                <x> 100 </x>
                <y> -87.6</y>
                <z> -19.2 </z>
            </location>
        </pointmass>
        <pointmass name="Ammo left middle gun">
            <weight unit="LBS"> 0 </weight>
            <location name="POINTMASS" unit="IN">
                <x> 100 </x>
                <y> 87.6</y>
                <z> -19.2 </z>
            </location>
        </pointmass>

        <pointmass name="Ammo right outer gun">
            <weight unit="LBS"> 0 </weight>
            <location name="POINTMASS" unit="IN">
                <x> 100 </x>
                <y> -96</y>
                <z> -19.2 </z>
            </location>
        </pointmass>
        <pointmass name="Ammo left outer gun">
            <weight unit="LBS"> 0 </weight>
            <location name="POINTMASS" unit="IN">
                <x> 100 </x>
                <y> 96</y>
                <z> -19.2 </z>
            </location>
        </pointmass>

        <pointmass name="left rockets">
            <weight unit="LBS"> 0 </weight>
            <location name="POINTMASS" unit="IN">
                <x> 98 </x>
                <y> 87.6</y>
                <z> -30 </z>
            </location>
        </pointmass>
        <pointmass name="right rockets">
            <weight unit="LBS"> 0 </weight>
            <location name="POINTMASS" unit="IN">
                <x> 98 </x>
                <y> -87</y>
                <z> -30 </z>
            </location>
        </pointmass>

        <pointmass name="left bomb">
            <weight unit="LBS"> 0 </weight>
            <location name="POINTMASS" unit="IN">
                <x> 98 </x>
                <y> 87.6</y>
                <z> -43 </z>
            </location>
        </pointmass>
        <pointmass name="right bomb">
            <weight unit="LBS"> 0 </weight>
            <location name="POINTMASS" unit="IN">
                <x> 98 </x>
                <y> -87</y>
                <z> -43 </z>
            </location>
        </pointmass>

        <pointmass name="left drop tank">
            <weight unit="LBS"> 0 </weight>
            <location name="POINTMASS" unit="IN">
                <x> 98 </x>
                <y> 87.6</y>
                <z> -43 </z>
            </location>
        </pointmass>
        <pointmass name="right drop tank">
            <weight unit="LBS"> 0 </weight>
            <location name="POINTMASS" unit="IN">
                <x> 98 </x>
                <y> -87</y>
                <z> -43 </z>
            </location>
        </pointmass>

    </mass_balance>

    <ground_reactions>
        <contact type="BOGEY" name="LEFT_MLG">
            <location unit="IN">
                <x> 75.25 </x>
                <y> -72 </y>
                <z> -85 </z>
            </location>
            <static_friction> 0.55 </static_friction>
            <dynamic_friction> 0.5 </dynamic_friction>
            <rolling_friction> 0.02 </rolling_friction>
            <spring_coeff unit="LBS/FT"> 9800 </spring_coeff>
            <damping_coeff unit="LBS/FT/SEC"> 2500 </damping_coeff>
            <damping_coeff_rebound unit="LBS/FT/SEC">6200</damping_coeff_rebound>
            <max_steer unit="DEG"> 0.0 </max_steer>
            <brake_group> LEFT </brake_group>
            <retractable>1</retractable>
        </contact>
        <contact type="BOGEY" name="RIGHT_MLG">
            <location unit="IN">
                <x> 75.25 </x>
                <y> 72 </y>
                <z> -85 </z>
            </location>
            <static_friction> 0.55 </static_friction>
            <dynamic_friction> 0.5 </dynamic_friction>
            <rolling_friction> 0.02 </rolling_friction>
            <spring_coeff unit="LBS/FT"> 9800 </spring_coeff>
            <damping_coeff unit="LBS/FT/SEC"> 2500 </damping_coeff>
            <damping_coeff_rebound unit="LBS/FT/SEC">6200</damping_coeff_rebound>
            <max_steer unit="DEG"> 0.0 </max_steer>
            <brake_group> RIGHT </brake_group>
            <retractable>1</retractable>
        </contact>
        <contact type="BOGEY" name="TAIL_LG">
            <location unit="IN">
                <x> 270.2 </x>
                <y> 0 </y>
                <z> -37.5 </z>
            </location>
            <static_friction> 0.66 </static_friction>
            <dynamic_friction> 0.6 </dynamic_friction>
            <rolling_friction> 0.02 </rolling_friction>
            <spring_coeff unit="LBS/FT"> 3500 </spring_coeff>
            <damping_coeff unit="LBS/FT/SEC"> 4280 </damping_coeff>
            <steerability> STEERABLE </steerability>
            <max_steer unit="DEG"> 360.0 </max_steer>
            <brake_group> NONE </brake_group>
            <retractable>1</retractable>
        </contact>

        <!-- Next three are jack stands for testing landing gear functionality
         <contact type="STRUCTURE" name="LEFT_WING_TIP_JACK_STAND">
              <location unit="IN">
              <x> 25 </x>
              <y> -222 </y>
              <z>  -97 </z>
              </location>
              <static_friction>  0.80 </static_friction>
              <dynamic_friction> 0.50 </dynamic_friction>
              <spring_coeff unit="LBS/FT">       11000 </spring_coeff>
              <damping_coeff unit="LBS/FT/SEC">  1179.23 </damping_coeff>
          </contact>

            <contact type="STRUCTURE" name="RIGHT_WING_TIP_JACK_STAND">
              <location unit="IN">
              <x> 25 </x>
              <y> 222 </y>
              <z>  -97 </z>
              </location>
              <static_friction>  0.80 </static_friction>
              <dynamic_friction> 0.50 </dynamic_friction>
              <spring_coeff unit="LBS/FT">       11000 </spring_coeff>
              <damping_coeff unit="LBS/FT/SEC">  1179.23 </damping_coeff>
          </contact>

          <contact type="STRUCTURE" name="TAIL_JACK_STAND">
              <location unit="IN">
              <x> 270 </x>
              <y> 0 </y>
              <z>  -95 </z>
              </location>
              <static_friction>  0.80 </static_friction>
              <dynamic_friction> 0.50 </dynamic_friction>
              <spring_coeff unit="LBS/FT">       11000 </spring_coeff>
              <damping_coeff unit="LBS/FT/SEC">  1179.23 </damping_coeff>
          </contact>

        Comment out the Jack stand section when not doing gear tests -->

          <contact type="STRUCTURE" name="LEFT_WING_TIP_BOTTOM">
              <location unit="IN">
              <x> 103 </x>
              <y> -217.5 </y>
              <z>  -11.5 </z>
              </location>
              <static_friction>  0.80 </static_friction>
              <dynamic_friction> 0.50 </dynamic_friction>
              <spring_coeff unit="LBS/FT">       11000 </spring_coeff>
              <damping_coeff unit="LBS/FT/SEC">  1179.23 </damping_coeff>
          </contact>

            <contact type="STRUCTURE" name="RIGHT_WING_TIP_BOTTOM">
              <location unit="IN">
              <x> 103 </x>
              <y> 217.5 </y>
              <z>  -11.5 </z>
              </location>
              <static_friction>  0.80 </static_friction>
              <dynamic_friction> 0.50 </dynamic_friction>
              <spring_coeff unit="LBS/FT">       11000 </spring_coeff>
              <damping_coeff unit="LBS/FT/SEC">  1179.23 </damping_coeff>
          </contact>

          <contact type="STRUCTURE" name="LEFT_WING_TIP_TOP">
              <location unit="IN">
              <x> 103 </x>
              <y> -217.5 </y>
              <z>  -4.6 </z>
              </location>
              <static_friction>  0.80 </static_friction>
              <dynamic_friction> 0.50 </dynamic_friction>
              <spring_coeff unit="LBS/FT">       11000 </spring_coeff>
              <damping_coeff unit="LBS/FT/SEC">  1179.23 </damping_coeff>
          </contact>

          <contact type="STRUCTURE" name="RIGHT_WING_TIP_TOP">
              <location unit="IN">
              <x> 103 </x>
              <y> 217.5 </y>
              <z>  -4.6 </z>
              </location>
              <static_friction>  0.80 </static_friction>
              <dynamic_friction> 0.50 </dynamic_friction>
              <spring_coeff unit="LBS/FT">       11000 </spring_coeff>
              <damping_coeff unit="LBS/FT/SEC">  1179.23 </damping_coeff>
          </contact>

          <contact type="STRUCTURE" name="LEFT_WING_TIP_FRONT">
              <location unit="IN">
              <x> 84 </x>
              <y> -222.5 </y>
              <z>  -4.6 </z>
              </location>
              <static_friction>  0.80 </static_friction>
              <dynamic_friction> 0.50 </dynamic_friction>
              <spring_coeff unit="LBS/FT">       11000 </spring_coeff>
              <damping_coeff unit="LBS/FT/SEC">  1179.23 </damping_coeff>
          </contact>

          <contact type="STRUCTURE" name="RIGHT_WING_TIP_FRONT">
              <location unit="IN">
              <x> 84 </x>
              <y> 222.5 </y>
              <z>  -8 </z>
              </location>
              <static_friction>  0.80 </static_friction>
              <dynamic_friction> 0.50 </dynamic_friction>
              <spring_coeff unit="LBS/FT">       11000 </spring_coeff>
              <damping_coeff unit="LBS/FT/SEC">  1179.23 </damping_coeff>
          </contact>

          <contact type="STRUCTURE" name="TAIL_BOTTOM">
              <location unit="IN">
              <x> 327 </x>
              <y> 0 </y>
              <z>  -8.6 </z>
              </location>
              <static_friction>  0.80 </static_friction>
              <dynamic_friction> 0.50 </dynamic_friction>
              <spring_coeff unit="LBS/FT">       11000 </spring_coeff>
              <damping_coeff unit="LBS/FT/SEC">  1179.23 </damping_coeff>
          </contact>

          <contact type="STRUCTURE" name="TAIL_TOP">
              <location unit="IN">
              <x> 318 </x>
              <y> 0 </y>
              <z>  65 </z>
              </location>
              <static_friction>  0.80 </static_friction>
              <dynamic_friction> 0.50 </dynamic_friction>
              <spring_coeff unit="LBS/FT">       11000 </spring_coeff>
              <damping_coeff unit="LBS/FT/SEC">  1179.23 </damping_coeff>
          </contact>

          <contact type="STRUCTURE" name="NOSE_BOTTOM">
              <location unit="IN">
              <x> 0 </x>
              <y> 0 </y>
              <z>  -25 </z>
              </location>
              <static_friction>  0.80 </static_friction>
              <dynamic_friction> 0.50 </dynamic_friction>
              <spring_coeff unit="LBS/FT">       11000 </spring_coeff>
              <damping_coeff unit="LBS/FT/SEC">  1179.23 </damping_coeff>
          </contact>

          <contact type="STRUCTURE" name="NOSE_TOP">
              <location unit="IN">
              <x> 0 </x>
              <y> 0 </y>
              <z> 13 </z>
              </location>
              <static_friction>  0.80 </static_friction>
              <dynamic_friction> 0.50 </dynamic_friction>
              <spring_coeff unit="LBS/FT">       11000 </spring_coeff>
              <damping_coeff unit="LBS/FT/SEC">  1179.23 </damping_coeff>
          </contact>

          <contact type="STRUCTURE" name="CANOPY">
              <location unit="IN">
                <x> 133 </x>
                <y> 0 </y>
                <z> 34 </z>
              </location>
              <static_friction>  0.80 </static_friction>
              <dynamic_friction> 0.50 </dynamic_friction>
              <spring_coeff unit="LBS/FT">       11000 </spring_coeff>
              <damping_coeff unit="LBS/FT/SEC">  1179.23 </damping_coeff>
          </contact>

           <contact type="STRUCTURE" name="BELLY">
              <location unit="IN">
              <x> 52 </x>
              <y> 0 </y>
              <z>  -34 </z>
              </location>
              <static_friction>  0.80 </static_friction>
              <dynamic_friction> 0.50 </dynamic_friction>
              <spring_coeff unit="LBS/FT">       11000 </spring_coeff>
              <damping_coeff unit="LBS/FT/SEC">  1179.23 </damping_coeff>
          </contact>

           <contact type="STRUCTURE" name="DOG_HOUSE">
              <location unit="IN">
              <x> 143 </x>
              <y> 0 </y>
              <z> -46 </z>
              </location>
              <static_friction>  0.80 </static_friction>
              <dynamic_friction> 0.50 </dynamic_friction>
              <spring_coeff unit="LBS/FT">       11000 </spring_coeff>
              <damping_coeff unit="LBS/FT/SEC">  1179.23 </damping_coeff>
          </contact>

          <contact type="STRUCTURE" name="PROP_BOTTOM">
              <location unit="IN">
              <x> -13.6 </x>
              <y> 0 </y>
              <z> -70.4 </z>
              </location>
              <static_friction>  0.80 </static_friction>
              <dynamic_friction> 0.50 </dynamic_friction>
              <spring_coeff unit="LBS/FT">       500 </spring_coeff>
              <damping_coeff unit="LBS/FT/SEC">  5000 </damping_coeff>
          </contact>

          <contact type="STRUCTURE" name="PROP_TOP">
              <location unit="IN">
              <x> -17.7 </x>
              <y> 0 </y>
              <z> 65.1 </z>
              </location>
              <static_friction>  0.80 </static_friction>
              <dynamic_friction> 0.50 </dynamic_friction>
              <spring_coeff unit="LBS/FT">       500 </spring_coeff>
              <damping_coeff unit="LBS/FT/SEC">  5000 </damping_coeff>
          </contact>

          <contact type="STRUCTURE" name="PROP_LEFT">
              <location unit="IN">
              <x> -15.5 </x>
              <y> -67.76 </y>
              <z> -3.4 </z>
              </location>
              <static_friction>  0.80 </static_friction>
              <dynamic_friction> 0.50 </dynamic_friction>
              <spring_coeff unit="LBS/FT">       500 </spring_coeff>
              <damping_coeff unit="LBS/FT/SEC">  5000 </damping_coeff>
          </contact>

          <contact type="STRUCTURE" name="PROP_RIGHT">
              <location unit="IN">
              <x> -15.5 </x>
              <y> 67.76 </y>
              <z> -3.4 </z>
              </location>
              <static_friction>  0.80 </static_friction>
              <dynamic_friction> 0.50 </dynamic_friction>
              <spring_coeff unit="LBS/FT">       500 </spring_coeff>
              <damping_coeff unit="LBS/FT/SEC">  5000 </damping_coeff>
          </contact>

          <contact type="STRUCTURE" name="PROP_SPINNER">
              <location unit="IN">
              <x> -32.67 </x>
              <y> 0 </y>
              <z> -3.1265 </z>
              </location>
              <static_friction>  0.80 </static_friction>
              <dynamic_friction> 0.50 </dynamic_friction>
              <spring_coeff unit="LBS/FT">       5000 </spring_coeff>
              <damping_coeff unit="LBS/FT/SEC">  5000 </damping_coeff>
         </contact>

    </ground_reactions>

    <propulsion>
        <engine file="Packard-V-1650-7">
            <location unit="IN">
                <x> 36 </x>
                <y> 0 </y>
                <z> 0 </z>
            </location>
            <orient unit="DEG">
                <roll> -4.0 </roll>
                <pitch> 2.5 </pitch>
                <yaw> 0 </yaw>
            </orient>
            <feed>0</feed>
            <feed>1</feed>
            <feed>2</feed>
            <feed>3</feed>
            <feed>4</feed>
            <thruster file="P51prop">
                <location unit="IN">
                    <x> 36 </x>
                    <y> 0 </y>
                    <z> 0 </z>
                </location>
                <orient unit="DEG">
                    <roll> -4.0 </roll>
                    <pitch> 2.5 </pitch>
                    <yaw> 0 </yaw>
                </orient>
                <sense> 1 </sense>
                <p_factor> 60 </p_factor>
            </thruster>
        </engine>

        <!--
           internal wing tanks
           capacity 92 US gallons each
        -->
        <tank type="FUEL" number="0">    <!-- Tank number 0 left wing -->
            <location unit="IN">
                <x> 106 </x>
                <y> -80 </y>
                <z> -9.675 </z>
            </location>
            <capacity unit="LBS"> 553.84 </capacity>
            <contents unit="LBS"> 396 </contents>
            <priority> 1 </priority>
            <type> AVGAS </type>
        </tank>
        <tank type="FUEL" number="1">    <!-- Tank number 1 right wing-->
            <location unit="IN">
                <x> 106 </x>
                <y> 80 </y>
                <z> -9.675 </z>
            </location>
            <capacity unit="LBS"> 553.84 </capacity>
            <contents unit="LBS"> 396 </contents>
            <priority> 1 </priority>
            <type> AVGAS </type>
        </tank>
        <tank type="FUEL" number="2">    <!-- Tank number 2 FUS-->
            <location unit="IN">
                <x> 160 </x>
                <y> 0 </y>
                <z> -3.0 </z>
            </location>
            <capacity unit="LBS"> 511.7 </capacity>
            <contents unit="LBS"> 0 </contents>
            <priority> 1 </priority>
            <type> AVGAS </type>
        </tank>
        <tank type="FUEL" number="3">    <!-- Tank number 3 left drop -->
            <location unit="IN">
                <x> 97.5 </x>
                <y> -198 </y>
                <z> -25 </z>
            </location>
            <capacity unit="LBS"> 451.5 </capacity>
            <contents unit="LBS"> 0 </contents>
            <priority> 1 </priority>
            <type> AVGAS </type>
        </tank>
        <tank type="FUEL" number="4">    <!-- Tank number 4 right drop -->
            <location unit="IN">
                <x> 97.5 </x>
                <y> 198 </y>
                <z> -25 </z>
            </location>
            <capacity unit="LBS"> 451.5 </capacity>
            <contents unit="LBS"> 0 </contents>
            <priority> 1 </priority>
            <type> AVGAS </type>
        </tank>

    </propulsion>

    <system file="vacuum-system"/>
    <system file="parking-brake"/>
    <system file="indicated-airspeed"/>
    <system file="propulsion"/>
    <system file="autothrottle"/>
    <system file="autocooling"/>
    <system file="mixture-control"/>
    <system file="alpha-buffet"/>
    <system file="crash-detect"/>
    <system file="compressability"/>
    <system file="weapons-weight"/>
    <system file="tail-wheel"/>
    <system file="electrical"/>
    <system file="hydraulic"/>
    <system file="MPAnimation"/>
    <system file="effects"/>
    <system file="securing"/>
    <system file="pilot"/>

    <flight_control name="FCS: P51D">

        <channel name="exhaust thrust">

            <switch name="aero/function/running-factor">
                <default value="0.3" />
                <test value="1.0">
                   propulsion/engine/set-running GT 0
                </test>
            </switch>

            <fcs_function name="aero/function/engine-exhaust-thrust">
                <function>
                    <product>
                        <property>aero/function/running-factor</property>
                        <property>propulsion/engine/propeller-rpm</property>
                        <value>0.00079365079</value> <!-- 1/1260 to nomalize engine/rpm -->
                        <property> propulsion/engine/map-inhg </property>
                        <value>0.01234567</value> <!-- 1/81 inhg to nomalize engine/map-inhg -->
                        <value> 200 </value> <!-- 200 lbs of thrust at full RPM and map -->
                    </product>
                </function>
                <output> external_reactions/exhaust-thrust/magnitude </output>
            </fcs_function>

        </channel>

        <channel name="Pitch">
            <actuator name="fcs/elevator-cmd-norm-actuator">
                <input>fcs/elevator-cmd-norm</input>
                <rate_limit>5.0</rate_limit><!-- 0.2 s -->
                <clipto>
                    <min>-1.0000</min><!-- 30.0 deg up -->
                    <max> 0.6667</max><!-- 20.0 deg down -->
                </clipto>
                <output>/aircraft/surface-positions/elevator-pos-norm</output>
            </actuator>

            <actuator name="fcs/pitch-trim-cmd-norm-actuator">
                <input>fcs/pitch-trim-cmd-norm</input>
                <rate_limit>5.0</rate_limit><!-- 0.2 s -->
                <clipto>
                    <min>-0.4</min><!-- 10.0 deg up -->
                    <max> 1.0</max><!-- 25.0 deg down -->
                </clipto>
                <output>/aircraft/surface-positions/pitch-trim-pos-norm</output>
            </actuator>

            <pure_gain name="Pitch Trim Scaled">
                <input>fcs/pitch-trim-cmd-norm-actuator</input>
                <gain>0.4455</gain>
            </pure_gain>

            <summer name="Pitch Trim Offest Bias">
                <input>fcs/pitch-trim-scaled</input>
                <bias>0.02546</bias>
                <clipto>
                    <min>-1.0</min>
                    <max> 1.0</max>
                </clipto>
                <output>fcs/pitch-trim-cmd-norm-offset-biased</output>
            </summer>

            <summer name="Pitch Trim Sum">
                <input>fcs/elevator-cmd-norm-actuator</input>
                <input>fcs/pitch-trim-cmd-norm-offset-biased</input>
                <clipto>
                    <min>-1.7</min>
                    <max> 1.7</max>
                </clipto>
            </summer>

            <aerosurface_scale name="Elevator Control">
                <input>fcs/pitch-trim-sum</input>
                <range>
                    <min>-30.0</min>
                    <max> 30.0</max><!-- 20.0 deg is set in clipto in actuator -->
                </range>
                <output>fcs/elevator-pos-deg</output>
            </aerosurface_scale>

            <aerosurface_scale name="Elevator Position Normalized">
                <input>fcs/elevator-pos-deg</input>
                <domain>
                    <min>-30.0</min>
                    <max> 30.0</max><!-- 20.0 deg is set in clipto in actuator -->
                </domain>
                <range>
                   <min>-1.0</min>
                   <max> 1.0</max>
                </range>
                <output>fcs/elevator-pos-norm</output>
            </aerosurface_scale>

	<fcs_function name="aero/pitch-moment-damping-factor">
	<function>
	  <description>pitch damping during take off</description>
	  <product>
	  <property>gear/wow</property>
	  <value>0.2</value>
	  <table>
        <independentVar lookup="row">aero/alpha-deg</independentVar>
		<independentVar lookup="column">velocities/vc-kts</independentVar>
		<independentVar lookup="table">aero/alphadot-deg_sec</independentVar>
           <tableData breakPoint="-10.0">
		   		     70          80
           -4.25    5.0         1.0
           -3.25    10.0        1.0
           -2.25    25.0        1.0
           -1.25    25.0        1.0
           -0.25    15.0        1.0
            0.75    10.0        1.0
            1.75    1.0         1.0
    		2.75 	1.0         1.0
	    	3.75 	1.0         1.0
		    4.75    1.0         1.0
     		5.75 	1.0         1.0
            6.75    1.0         1.0
			7.75    1.0         1.0
			</tableData>
			<tableData breakPoint="0.0">
		             70          80
           -4.25    1.0         1.0
           -3.25    1.0         1.0
           -2.25    1.0         1.0
           -1.25    1.0         1.0
           -0.25    1.0         1.0
            0.75    1.0         1.0
            1.75    1.0         1.0
    		2.75 	1.0         1.0
	    	3.75 	1.0         1.0
		    4.75    1.0         1.0
     		5.75 	1.0         1.0
            6.75    1.0         1.0
			7.75    1.0         1.0
			</tableData>
		    <tableData breakPoint="10.0">
                   70          80
           -4.25    1.0         1.0
           -3.25    1.0         1.0
           -2.25    1.0         1.0
           -1.25    1.0         1.0
           -0.25    1.0         1.0
            0.75    1.0         1.0
            1.75    1.0         1.0
    		2.75 	10.0        1.0
	    	3.75 	15.0        1.0
		    4.75    25.0        1.0
     		5.75 	25.0        1.0
            6.75    10.0        1.0
			7.75    5.0         1.0
			</tableData>
      </table>
	  </product>
	  </function>
	  <clipto>
          <min>1.0</min>
		  <max>100</max>
       </clipto>
	  <output>aero/pitch-moment-damping-factor</output>
	</fcs_function>
        </channel>

        <channel name="guns">

           <switch name="systems/armament/innerGunsFiring">
             <default value="0" />
             <test logic="AND" value="1">
                /controls/armament/gun-trigger > 0
                /ai/submodels/submodel[6]/count > 0
             </test>
           </switch>

           <switch name="systems/armament/outerGunsFiring">
             <default value="0" />
             <test logic="AND" value="1">
                /controls/armament/gun-trigger > 0
                /ai/submodels/submodel[8]/count > 0
             </test>
           </switch>

           <switch name="systems/armament/ejectionAnimatedOuter">
             <default value="0" />
             <test logic="AND" value="1">
                /sim/frame-rate > 50
                systems/armament/outerGunsFiring > 0
                /sim/current-view/internal == 0
             </test>
           </switch>

           <switch name="systems/armament/ejectionAnimatedInner">
             <default value="0" />
             <test logic="AND" value="1">
                /sim/frame-rate > 50
                systems/armament/innerGunsFiring > 0
                /sim/current-view/internal == 0
             </test>
           </switch>

           <switch name="systems/armament/gunSmokeAnimatedInner">
             <default value="0" />
             <test logic="AND" value="1">
                systems/armament/innerGunsFiring > 0
             </test>
           </switch>

           <switch name="systems/armament/gunSmokeAnimatedOuter">
             <default value="0" />
             <test logic="AND" value="1">
                systems/armament/outerGunsFiring > 0
             </test>
           </switch>

           <switch name="systems/armament/muzzleFlashAnimatedOuter">
             <default value="0" />
             <test logic="AND" value="1">
                systems/armament/outerGunsFiring > 0
             </test>
           </switch>

           <switch name="systems/armament/muzzleFlashAnimatedInner">
             <default value="0" />
             <test logic="AND" value="1">
                systems/armament/innerGunsFiring > 0
             </test>
           </switch>

        </channel>

        <channel name="Roll">
            <actuator name="fcs/aileron-cmd-norm-actuator">
                <input>fcs/aileron-cmd-norm</input>
                <rate_limit>5.0</rate_limit><!-- 0.2 s -->
                <clipto>
                    <min>-1.0</min><!-- -15.0 deg -->
                    <max> 1.0</max><!--  15.0 deg -->
                </clipto>
                <output>/aircraft/surface-positions/aileron-pos-norm</output>
            </actuator>

            <!--
                 Aileron trim servo tab goes up/down when aileron goes down/up.
                 See video "P-51D Mustang - Part 1 / Walkaround Tour - Kermie Cam"
                 at https://youtu.be/jzKFkYLHq3Q?t=284
            -->
            <summer name="fcs/roll-trim-balance-norm">
                <input>fcs/roll-trim-cmd-norm</input>
                <input>-fcs/aileron-cmd-norm-actuator</input>
            </summer>

            <actuator name="fcs/roll-trim-cmd-norm-actuator">
                <input>fcs/roll-trim-balance-norm</input>
                <rate_limit>5.0</rate_limit><!-- 0.2 s -->
                <clipto>
                    <min>-1.0</min><!-- -10.0 deg -->
                    <max> 1.0</max><!--  10.0 deg -->
                </clipto>
                <output>/aircraft/surface-positions/roll-trim-pos-norm</output>
            </actuator>

            <pure_gain name="Roll Trim Scaled">
                <input>fcs/roll-trim-cmd-norm-actuator</input>
                <gain>0.5</gain>
            </pure_gain>

            <summer name="Roll Trim Sum">
                <input>fcs/aileron-cmd-norm-actuator</input>
                <input>fcs/roll-trim-scaled</input>
                <clipto>
                    <min>-1.3</min>
                    <max> 1.3</max>
                </clipto>
            </summer>

            <aerosurface_scale name="Left Aileron Control">
                <input>fcs/roll-trim-sum</input>
                <range>
                    <min>-15.0</min>
                    <max> 15.0</max>
                </range>
                <output>fcs/left-aileron-pos-deg</output>
            </aerosurface_scale>

            <aerosurface_scale name="Left Aileron Position Normalized">
                <input>fcs/left-aileron-pos-deg</input>
                <domain>
                    <min>-15.0</min>
                    <max> 15.0</max>
                </domain>
                <range>
                   <min>-1.0</min>
                   <max> 1.0</max>
                </range>
                <output>fcs/left-aileron-pos-norm</output>
            </aerosurface_scale>

            <aerosurface_scale name="Right Aileron Control">
                <input>-fcs/roll-trim-sum</input>
                <range>
                    <min>-15.0</min>
                    <max> 15.0</max>
                </range>
                <output>fcs/right-aileron-pos-deg</output>
            </aerosurface_scale>

            <aerosurface_scale name="Right Aileron Position Normalized">
                <input>fcs/right-aileron-pos-deg</input>
                <domain>
                    <min>-15.0</min>
                    <max> 15.0</max>
                </domain>
                <range>
                   <min>-1.0</min>
                   <max> 1.0</max>
                </range>
                <output>fcs/right-aileron-pos-norm</output>
            </aerosurface_scale>
        </channel>

        <channel name="Yaw">
            <actuator name="fcs/rudder-cmd-norm-actuator">
                <input>fcs/rudder-cmd-norm</input>
                <rate_limit>5.0</rate_limit><!-- 0.2 s -->
                <clipto>
                    <min>-1.0</min><!-- -30.0 deg -->
                    <max> 1.0</max><!--  30.0 deg -->
                </clipto>
                <output>/aircraft/surface-positions/rudder-pos-norm</output>
            </actuator>

            <!--
                 Rudder trim anti-servo tab moves in same direction when
                 rudder goes left/right.
                 See video "P-51D Mustang - Part 1 / Walkaround Tour - Kermie Cam"
                 at https://youtu.be/jzKFkYLHq3Q?t=462
            -->
            <summer name="fcs/yaw-trim-boost-norm">
                <input>fcs/yaw-trim-cmd-norm</input>
                <input>fcs/rudder-cmd-norm-actuator</input>
            </summer>

            <actuator name="fcs/yaw-trim-cmd-norm-actuator">
                <input>fcs/yaw-trim-boost-norm</input>
                <rate_limit>5.0</rate_limit><!-- 0.2 s -->
                <clipto>
                    <min>-1.0</min><!-- -10.0 deg -->
                    <max> 1.0</max><!--  10.0 deg -->
                </clipto>
                <output>/aircraft/surface-positions/yaw-trim-pos-norm</output>
            </actuator>

            <pure_gain name="Yaw Trim Scaled">
                <input>fcs/yaw-trim-cmd-norm-actuator</input>
                <gain>0.5</gain>
            </pure_gain>

            <summer name="Rudder Command Sum">
                <input>fcs/rudder-cmd-norm-actuator</input>
                <input>fcs/yaw-trim-scaled</input>
                <clipto>
                    <min>-1.0</min>
                    <max> 1.0</max>
                </clipto>
            </summer>

            <aerosurface_scale name="Rudder Control">
                <input>fcs/rudder-command-sum</input>
                <range>
                    <min>-30.0</min>
                    <max> 30.0</max>
                </range>
                <output>fcs/rudder-pos-deg</output>
            </aerosurface_scale>

            <aerosurface_scale name="Rudder Position Normalized">
                <input>fcs/rudder-pos-deg</input>
                <domain>
                    <min>-30.0</min>
                    <max> 30.0</max>
                </domain>
                <range>
                   <min>-1.0</min>
                   <max> 1.0</max>
                </range>
                <output>fcs/rudder-pos-norm</output>
            </aerosurface_scale>
        </channel>

        <channel name="Flaps">
            <kinematic name="Flaps Control">
                <input>fcs/flap-cmd-norm</input>
                <traverse>
                    <setting>
                        <position>0</position>
                        <time>0</time>
                    </setting>
                    <setting>
                        <position>10</position>
                        <time>3</time>
                    </setting>
                    <setting>
                        <position>20</position>
                        <time>3</time>
                    </setting>
                    <setting>
                        <position>30</position>
                        <time>3</time>
                    </setting>
                    <setting>
                        <position>40</position>
                        <time>3</time>
                    </setting>
                    <setting>
                        <position>47</position>
                        <time>3</time>
                    </setting>
                </traverse>
                <output>fcs/flap-pos-deg</output>
            </kinematic>

            <kinematic name="Flaps Command Degree">
                <input>fcs/flap-cmd-norm</input>
                <traverse>
                    <setting>
                        <position>0</position>
                        <time>0</time>
                    </setting>
                    <setting>
                        <position>10</position>
                        <time>0</time>
                    </setting>
                    <setting>
                        <position>20</position>
                        <time>0</time>
                    </setting>
                    <setting>
                        <position>30</position>
                        <time>0</time>
                    </setting>
                    <setting>
                        <position>40</position>
                        <time>0</time>
                    </setting>
                    <setting>
                        <position>47</position>
                        <time>0</time>
                    </setting>
                </traverse>
                <output>fcs/flap-cmd-deg</output>
            </kinematic>

            <aerosurface_scale name="Flap Position Normalizer">
              <input>fcs/flap-pos-deg</input>
              <domain>
                <min>0</min>  <!-- Flaps actual minimum position -->
                <max>47</max>  <!-- Flaps actual maximum position -->
              </domain>
              <range>
                <min>0</min>  <!-- Flaps normalized minimum position -->
                <max>1</max>  <!-- Flaps normalized maximum position -->
              </range>
              <output>fcs/flap-pos-norm</output>
            </aerosurface_scale>
        </channel>

        <channel name="Landing Gear">

            <actuator name="gear/lever-pos-norm-actuator">
                <input>gear/gear-cmd-norm</input>
                <rate_limit>0.5</rate_limit><!-- 2.0 s -->
                <output>/aircraft/controls/lever-pos-norm</output>
            </actuator>

            <kinematic name="Gear Control Up">
                <input>gear/gear-cmd-norm</input>
                <traverse>
                    <setting>
                        <position>0</position>
                        <time>0</time>
                    </setting>
                    <setting>
                        <position>1</position>
                        <time>14.1</time>
                    </setting>
                </traverse>
                <output>gear/gear-cmd-norm-up</output>
            </kinematic>

            <kinematic name="Gear Control Down">
                <input>gear/gear-cmd-norm</input>
                <traverse>
                    <setting>
                        <position>0</position>
                        <time>0</time>
                    </setting>
                    <setting>
                        <position>1</position>
                        <time>8.1</time>
                    </setting>
                </traverse>
                <output>gear/gear-cmd-norm-down</output>
            </kinematic>

            <switch name="Gear Control Timed">
                <default value="0.0"/>

                <test value="gear/gear-cmd-norm-up">
                    gear/gear-cmd-norm == 0
                </test>

                <test value="gear/gear-cmd-norm-down">
                    gear/gear-cmd-norm == 1
                </test>

                <output>gear/gear-cmd-norm-filtered</output>
            </switch>

            <actuator name="gear/gear-pos-norm-actuator">
                <input>gear/gear-cmd-norm-filtered</input>
                <rate_limit>0.125</rate_limit><!-- 8.0 s -->
                <output>gear/gear-pos-norm</output>
            </actuator>

        </channel>

        <channel name="Brakes">

           <summer name="systems/brakes/brake-left">
                <input>/controls/gear/brake-left</input>
                <input>systems/brakes/brake-parking-cmd-out</input>
                <clipto>
                    <min>0</min>
                    <max>1</max>
                </clipto>
            </summer>

            <summer name="systems/brakes/brake-right">
                <input>/controls/gear/brake-right</input>
                <input>systems/brakes/brake-parking-cmd-out</input>
                <clipto>
                    <min>0</min>
                    <max>1</max>
                </clipto>
            </summer>

            <fcs_function name="systems/brakes/brake-scaling">
                <function>
                    <table>
                        <independentVar lookup="row">velocities/vg-fps</independentVar>
						<independentVar lookup="column">gear/unit[2]/compression-ft</independentVar>
						<independentVar lookup="table">propulsion/engine/map-inhg</independentVar>
                        <tableData breakPoint="11.0">
						        0.05   0.25
                            0   0.15    1.2
							15  0.075   1.0
                            24  0.3     1.0
							50  0.6     1.0
                        </tableData>
						<tableData breakPoint="20.0">
						        0.05    0.25
                            0   0.4     1.8
							15  0.3     1.5
                            24  0.3     1.0
							50  0.6     1.0
                        </tableData>
						<tableData breakPoint="30.0">
						        0.05    0.25
                            0   0.5     2.5
							15  0.4     2.0
                            24  0.3     1.0
							50  0.6     1.0
                        </tableData>
                    </table>
                </function>
            </fcs_function>

            <fcs_function name="Brake left">
               <function>
                   <product>
                      <property>systems/brakes/brake-left</property>
                      <property>systems/brakes/brake-scaling</property>
                   </product>
               </function>
               <output>fcs/left-brake-cmd-norm</output>
            </fcs_function>

            <fcs_function name="Brake right">
               <function>
                   <product>
                      <property>systems/brakes/brake-right</property>
                      <property>systems/brakes/brake-scaling</property>
                   </product>
               </function>
               <output>fcs/right-brake-cmd-norm</output>
            </fcs_function>

        </channel>

        <channel name="clipping">

           <pure_gain name="fcs/qbar-psf_clipped">
	         <description>qbar-psf_clipped</description>
	         <input>aero/qbar-psf</input>
             <gain>1.0</gain>
             <clipto>
                <min>-1000.0</min>
                <max>10000.0</max>
             </clipto>
	      </pure_gain>

        </channel>

    </flight_control>

    <external_reactions>

        <force name="exhaust-thrust" frame="BODY">
            <location unit="IN">
                <x>36.0</x> <!-- center of engine -->
                <y> 0.0</y>
                <z> 0.0</z>
            </location>
            <direction>
                <x>1.0</x> <!-- straight down the aircraft longitudinal axis -->
                <y>0.0</y>
                <z>0.0</z>
            </direction>
        </force>

        <!-- Tiedowns use body frame (x positive forward, y positive
             right, z positive down).
        -->
        <force name="tiedown-left" frame="BODY">
            <location unit="M">
                <x> 2.8000</x>
                <y>-4.0000</y>
                <z>-0.4500</z>
            </location>
            <direction>
                <x>0.0</x>
                <y>0.0</y>
                <z>1.0</z>
            </direction>
        </force>
        <force name="tiedown-right" frame="BODY">
            <location unit="M">
                <x> 2.8000</x>
                <y> 4.0000</y>
                <z>-0.4500</z>
            </location>
            <direction>
                <x>0.0</x>
                <y>0.0</y>
                <z>1.0</z>
            </direction>
        </force>

        <force name="tiedown-tail-left" frame="BODY">
            <location unit="M">
                <x> 6.4800</x>
                <y>-0.2600</y>
                <z>-0.4220</z>
            </location>
            <direction>
                <x>0.0</x>
                <y>0.0</y>
                <z>1.0</z>
            </direction>
        </force>
        <force name="tiedown-tail-right" frame="BODY">
            <location unit="M">
                <x> 6.4800</x>
                <y> 0.2600</y>
                <z>-0.4220</z>
            </location>
            <direction>
                <x>0.0</x>
                <y>0.0</y>
                <z>1.0</z>
            </direction>
        </force>

    </external_reactions>


    <aerodynamics>

       <function name="aero/function/kCLge">
            <description>Change_in_lift_due_to_ground_effect</description>
            <product>
                  <table>
                      <independentVar>aero/h_b-mac-ft</independentVar>
                      <tableData>
                          0.0000  1.2290
                          0.1000  1.1240
                          0.1500  1.1160
                          0.2000  1.1240
                          0.3000  1.1050
                          0.4000  1.0410
                          0.5000  1.0340
                          0.6000  1.0190
                          0.7000  1.0080
                          0.8000  1.0030
                          0.9000  1.0010
                          1.0000  1.0000
                          1.1000  1.0000
                      </tableData>
                  </table>
            </product>
        </function>

    <function name="aero/thrust-qbar_psf">
        <description>Dynamic_pressure_including_backwash</description>
        <sum>
            <product>
                <v> 0.5 </v>
                <p>atmosphere/rho-slugs_ft3</p>
                <pow>
                    <product>
                        <p> propulsion/engine/prop-induced-velocity_fps </p>
                        <v> 2.0 </v>
                    </product>
                    <v> 2.0 </v>
                </pow>
            </product>
            <p>aero/qbar-psf</p>
        </sum>
    </function>

        <axis name="DRAG">

            <!--
               Add in parisitic drag for fuselage etc.  Since
               "aero/coefficient/CDalpha" is the wing alone.
            -->
           <function name="aero/coefficient/CDo">
                <description>Drag_due_to_non_wing_components</description>
                <product>
                    <property>aero/qbar-psf</property>
                    <property>metrics/Sw-sqft</property>
                    <value> 0.62 </value>
                    <table>
                      <independentVar lookup="row">aero/alpha-deg</independentVar>
                      <tableData>
                          -90        0.25
                          -30        0.07
                          -15        0.03518
                          -12.5      0.02613
                          -10        0.02010
                          -7.5       0.01608
                          -5         0.01357
                          -2.5       0.01226
                          0          0.01216
                          2.5        0.01226
                          5          0.01357
                          7.5        0.01608
                          10         0.02010
                          12.5       0.02613
                          15         0.03518
                          30         0.07
                          90         0.25
                      </tableData>
                  </table>
                </product>
            </function>

            <!--
                 Cooling drag including Merideth Effect
                 Shuold be about 20% of total drag below mach 0.22
                 Should be about 3% of total drag above mach 0.6
            -->

            <function name="aero/coefficient/CDcooling">
                <description>Drag_due_to_cooling</description>
                <product>
                    <property>aero/qbar-psf</property>
                    <property>metrics/Sw-sqft</property>
                    <value> 0.0165 </value>
                    <pow>
                        <table>
                            <independentVar lookup="row">velocities/vc-kts</independentVar>
                            <tableData>
                                    0        1.0
                                    135      0.99
                                    174      0.37
                                    440      0.001
                            </tableData>
                        </table>
                        <value> 2.0 </value>
                    </pow>
                </product>
            </function>


            <function name="aero/coefficient/CDalpha">
                <description>Drag_due_to_alpha</description>
                    <!--
                      Drag as calculated by XFOIL for a blended section.
                      BL 17.5 was used for the root section and BL 215
                      for the tip section.  XFOIL was only able to generate
                      polars for +- 42 degrees alpha.  Other values were
                      generated wth JavaFoil and blended into the XFOIL polars.

                      This is the wing only
                    -->
                    <product>
                        <property>aero/qbar-psf</property>
                        <property>metrics/Sw-sqft</property>
                        <!--
                            increase drag to reflect real world conditions since
                            otherwise this would be an idealized prefect wing only.
                        -->
                         <value> 2.5 </value>
                        <table>
                        <independentVar>aero/alpha-deg</independentVar>
                        <independentVar lookup="column">aero/Re</independentVar>
                          <tableData>
                                     2500000    5000000    7000000     10000000   20000000    30000000    40000000
                            -180.00  0.01196    0.01196    0.01196     0.01196    0.01196     0.01196     0.01196
                            -40.000  0.42793    0.42793    0.43109     0.43142    0.43142     0.43141     0.43141
                            -33.000  0.37362    0.38395    0.38227     0.38552    0.38552     0.38551     0.38551
                            -28.000  0.33183    0.33183    0.33429     0.33183    0.30848     0.30235     0.30171
                            -24.500  0.28697    0.25687    0.29009     0.25687    0.25725     0.1800      0.08937
                            -21.000  0.18635    0.18635    0.07082     0.06035    0.04450     0.03672     0.03292
                            -17.500  0.04584    0.03323    0.02754     0.02451    0.02025     0.01794     0.01664
                            -14.000  0.01982    0.01631    0.01509     0.01432    0.01239     0.01159     0.01120
                            -10.500  0.01271    0.01074    0.01010     0.00942    0.00857     0.00818     0.00788
                            -7.000   0.00914    0.00782    0.00732     0.00692    0.00628     0.00596     0.00576
                            -3.500   0.00632    0.00590    0.00570     0.00548    0.00505     0.00481     0.00467
                            0.000    0.00439    0.00366    0.00342     0.00325    0.00361     0.00399     0.00430
                            3.500    0.00496    0.00491    0.00535     0.00534    0.00521     0.00501     0.00490
                            7.000    0.01021    0.00907    0.00856     0.00808    0.00731     0.00692     0.00666
                            10.500   0.01416    0.01235    0.01205     0.01158    0.01041     0.01041     0.00933
                            14.000   0.02484    0.02134    0.01898     0.01740    0.01545     0.01393     0.01301
                            17.500   0.05082    0.04156    0.03587     0.03234    0.03070     0.02353     0.02097
                            21.000   0.14902    0.10031    0.07940     0.07017    0.06069     0.04598     0.04083
                            24.500   0.27017    0.25475    0.24323     0.22145    0.22145     0.09994     0.08638
                            28.000   0.33274    0.33274    0.33685     0.30498    0.30500     0.29190     0.27190
                            33.000   0.38552    0.38552    0.39981     0.36428    0.36428     0.36522     0.36428
                            40.000   0.43095    0.43095    0.40944     0.40944    0.40944     0.40944     0.40944
                            180.00   0.0119     0.0119     0.0119      0.0119     0.0119      0.0119      0.0119
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                          </tableData>
                        </table>
                    </product>
            </function>

            <function name="aero/coefficient/CDi">
                <description>Induced_drag</description>
                <product>
                    <property>aero/qbar-psf</property>
                    <property>metrics/Sw-sqft</property>
                    <property>aero/cl-squared</property>
                    <value>0.0125</value> <!-- based on NACA X51 data -->
                </product>
            </function>

            <!-- from NACA P-51X and P-51B test data -->
            <function name="aero/coefficient/CDmach">
                <description>Drag_due_to_mach</description>
                <product>
                    <property>aero/qbar-psf</property>
                    <property>metrics/Sw-sqft</property>
                    <table>
                        <independentVar>velocities/mach</independentVar>
                        <tableData>
                            0.00    0.00000
                            0.62    0.00000
                            0.64    0.00100
                            0.66    0.00200
                            0.68    0.00500
                            0.70    0.01250
                            0.72    0.02000
                            0.74    0.03000
                            0.76    0.04300
                            0.78    0.06000
                            0.80    0.08000
                            0.82    0.10000
                            0.84    0.12500  <!-- guesses to extend the table -->
                            0.86    0.15500
                            0.88    0.20000
                            0.90    0.26000
                            0.92    0.35000
                            1.00    0.60000
                        </tableData>
                    </table>
                </product>
            </function>

            <function name="aero/coefficient/CDbeta">
                <description>Drag_due_to_sideslip</description>
                <product>
                    <property>aero/qbar-psf</property>
                    <property>metrics/Sw-sqft</property>
                      <table>
                          <independentVar>aero/beta-rad</independentVar>
                          <tableData>
                              -1.5700        0.500
                              -0.2600        0.0100
                              0.0000         0.0000
                              0.2600         0.0100
                              1.5700         0.500
                          </tableData>
                      </table>
                </product>
            </function>

            <!-- The rest of the drag functions are guesses.
                 These attempt to get flight characteristics
                 that approximate information is various sources
                 such as pilots reports and various NACA documents
                 that have information about how the P-51 is
                 affected by these drag sources.
                 -->

            <function name="aero/coefficient/CDflaps">
                <description>Drag_due_to_flaps</description>
                <product>
                    <property>aero/qbar-psf</property>
                    <property>metrics/Sw-sqft</property>
                    <property>fcs/flap-pos-norm</property>
                    <value>0.04</value>
                </product>
            </function>

            <function name="aero/coefficient/CDgear">
                <description>Drag_due_to_gear</description>
                <product>
                    <property>aero/qbar-psf</property>
                    <property>metrics/Sw-sqft</property>
                    <property>gear/gear-pos-norm</property>
                    <value>0.023</value>
                </product>
            </function>

            <function name="aero/coefficient/CDde">
                <description>Drag_due_to_Elevator_Deflection</description>
                    <product>
                        <property>aero/qbar-psf</property>
                        <property>metrics/Sh-sqft</property>
                        <table>
                            <independentVar>fcs/elevator-pos-norm</independentVar>
                            <tableData>
                               -1.0    1.0
                                0.0    0.0
                                1.0    1.0
                            </tableData>
                        </table>
                        <value>0.05</value>
                    </product>
            </function>

            <function name="aero/coefficient/CDda">
                <description>Drag_due_to_Aileron_Deflection</description>
                    <product>
                        <property>aero/qbar-psf</property>
                        <property>metrics/Sw-sqft</property>
                        <value> 0.8 </value>
                        <table>
                            <independentVar>fcs/left-aileron-pos-norm</independentVar>
                            <tableData>
                               -1.0    1.034
                                0.0    0.034
                                0.034    0.0
                                1.0    0.966
                            </tableData>
                        </table>
                        <value>0.006</value>
                    </product>
            </function>

        </axis>

        <axis name="SIDE">
            <function name="aero/coefficient/CYb">
                <description>Side_force_due_to_beta</description>
                <product>
                    <property>aero/qbar-psf</property>
                    <property>metrics/Sw-sqft</property>
                    <property>aero/beta-rad</property>
                    <value>-1.0000</value>
                </product>
            </function>
        </axis>

        <axis name="LIFT">

           <function name="aero/coefficient/CLalpha">
                <description>Lift_due_to_alpha</description>
                <product>
                    <property>aero/qbar-psf</property>
                    <property>metrics/Sw-sqft</property>
                    <property>aero/function/kCLge</property>
                    <value> 0.92 </value>
                    <table>
                         <!--
                                Drag as calculated by XFOIL for a blended section.
                                BL 17.5 was used for the root section and BL 215
                                for the tip section.  XFOIL was only able to generate
                                polars for +- 42 degrees alpha.  Other values were
                                generated wth JavaFoil and blended into the XFOIL polars.
                          -->
                          <independentVar lookup="row">aero/alpha-deg</independentVar>
                          <independentVar lookup="column">aero/Re</independentVar>
                          <tableData>
                                     2500000   5000000  7000000   10000000   20000000 30000000   40000000
                            -180.00  -0.168    -0.168   -0.168    -0.168    -0.168    -0.168     -0.168
                            -40.000  -1.1883   -1.1883  -1.2004   -1.2026   -1.2026   -1.2025    -1.2025
                            -33.000  -1.0421   -1.0668  -1.0700   -1.0749   -1.0749   -1.0749    -1.0749
                            -28.000  -0.9268   -0.9268  -0.9362   -0.9268   -0.9671   -0.9810    -0.9806
                            -24.500  -0.7952   -0.8352  -0.8263   -0.8752   -0.8927   -1.2202    -1.6624
                            -21.000  -0.7920   -0.8258  -1.4465   -1.5280   -1.6702   -1.7522    -1.7791
                            -17.500  -1.2691   -1.4173  -1.4892   -1.5333   -1.5205   -1.5579    -1.5864
                            -14.000  -1.2159   -1.2618  -1.2979   -1.3154   -1.3503   -1.3640    -1.3711
                            -10.500  -0.9634   -0.9872  -0.9948   -1.0026   -1.0125   -1.0174    -1.0211
                             -7.000  -0.6105   -0.6206  -0.6244   -0.6274   -0.6326   -0.6353    -0.6371
                             -3.500  -0.2309   -0.2306  -0.2309   -0.2316   -0.2337   -0.2351    -0.2362
                             0.000    0.1616    0.1621   0.1620    0.1621    0.1647    0.1649     0.1640
                             3.500    0.5655    0.5612   0.5542    0.5531    0.5523    0.5537     0.5547
                             7.000    0.8988    0.9132   0.9194    0.9250    0.9342    0.9389     0.9419
                             10.500   1.1703    1.2294   1.2423    1.2600    1.2788    1.2788     1.2993
                             14.000   1.3648    1.4202   1.4678    1.5047    1.4954    1.5335     1.5575
                             17.500   1.4337    1.5474   1.6185    1.6666    1.7050    1.7798     1.7556
                             21.000   1.1746    1.4099   1.5715    1.6546    1.7429    1.8800     1.9341
                             24.500   0.9892    1.0259   1.0570    1.1269    1.1269    1.7689     1.8697
                             28.000   1.0486    1.0486   1.0634    1.0829    1.1029    1.1100     1.1729
                             33.000   1.1571    1.1571   1.2096    1.2317    1.2317    1.2283     1.2317
                             40.000   1.2532    1.2532   1.3266    1.3266    1.3266    1.3266     1.3266
                             180.00   -0.168    -0.168  -0.168     -0.168   -0.168    -0.168     -0.168
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                          </tableData>
                      </table>
                </product>
            </function>

            <function name="aero/coefficient/dCLflap">
                <description>Delta_Lift_due_to_flaps</description>
                <product>
                    <property>aero/thrust-qbar_psf</property>
                    <property>metrics/Sw-sqft</property>
                    <property>fcs/flap-pos-norm</property>
                    <value>0.3000</value>
                </product>
            </function>

            <function name="aero/coefficient/CLde">
                <description>Lift_due_to_Elevator_Deflection</description>
                <product>
                    <property>aero/thrust-qbar_psf</property>
                    <property>metrics/Sw-sqft</property>
                    <property>fcs/elevator-pos-rad</property>
                    <value>0.2000</value>
                    <!-- Lowered elevator angle from 0.78 rad (~ 45 deg) to 30 deg -->
                    <value>0.6712804815</value><!-- 30.0 / rad2deg(0.78)  -->
                </product>
            </function>
        </axis>

        <axis name="ROLL">
            <function name="aero/coefficient/Clb">
                <description>Roll_moment_due_to_beta</description>
                <product>
                    <property>aero/qbar-psf</property>
                    <property>metrics/Sw-sqft</property>
                    <property>metrics/bw-ft</property>
                    <property>aero/beta-rad</property>
                    <value>-0.10</value>
                    <!-- Asymmetric stall -->
                    <table>
                        <independentVar lookup="row">aero/alpha-deg</independentVar>
                        <independentVar lookup="column">velocities/vc-kts</independentVar>
                        <tableData>
                                 0    90   140   180
                            -35  1    8     2    1
                            -10  1    14    4    2
                            -8   1    1     1    1
                            10.2 1    1     1    1
                            14   1    2.5   2    1.5
                            15   1    22.5  17.5 5
                            25   1    25    20   3
                            35   1    12    9    2
                        </tableData>
                    </table>
                    <table>
                        <independentVar lookup="row">/gear/gear[0]/wow</independentVar>
                        <independentVar lookup="column">/gear/gear[1]/wow</independentVar>
                        <tableData>
                                0   1
                            0   1   0
                            1   0   0
                        </tableData>
                    </table>
                </product>
            </function>

            <function name="aero/coefficient/Clp">
                <description>Roll_moment_due_to_roll_rate</description>
                <product>
                    <property>aero/qbar-psf</property>
                    <property>metrics/Sw-sqft</property>
                    <property>metrics/bw-ft</property>
                    <property>aero/bi2vel</property>
                    <property>velocities/p-aero-rad_sec</property>
                    <value>-0.4000</value>
                </product>
            </function>

            <function name="aero/coefficient/Clr">
                <description>Roll_moment_due_to_yaw_rate</description>
                <product>
                    <property>aero/qbar-psf</property>
                    <property>metrics/Sw-sqft</property>
                    <property>metrics/bw-ft</property>
                    <property>aero/bi2vel</property>
                    <property>velocities/r-aero-rad_sec</property>
                    <value>0.07</value>
                    <!-- Asymmetric stall -->
                    <table>
                        <independentVar lookup="row">aero/alpha-deg</independentVar>
                        <independentVar lookup="column">velocities/vc-kts</independentVar>
                        <tableData>
                                 0    90   140   180
                            -35  1    8     2    1
                            -10  1    14    4    2
                            -8   1    1     1    1
                            10.2 1    1     1    1
                            14   1    2.5   2    1.5
                            15   1    20    18   4
                            25   1    20    18   3
                            35   1    12    8    2
                        </tableData>
                    </table>
                    <table>
                        <independentVar lookup="row">/gear/gear[0]/wow</independentVar>
                        <independentVar lookup="column">/gear/gear[1]/wow</independentVar>
                        <tableData>
                                0   1
                            0   1   0
                            1   0   0
                        </tableData>
                    </table>
                </product>
            </function>

            <function name="aero/coefficient/Clda">
                <description>Roll_moment_due_to_aileron</description>
                <product>
                    <property>aero/qbar-psf</property>
                    <property>metrics/Sw-sqft</property>
                    <property>metrics/bw-ft</property>
                    <sum>
                       <property>fcs/left-aileron-pos-rad</property>
                       <value>0.02</value>
                       <!-- Lowered aileron angle from 0.35 rad (~ 20 deg) to 15 deg -->
                       <value>0.0882006122</value><!-- = 0.35 - deg2rad(15 deg) -->
                    </sum>
                    <table>
                        <independentVar>velocities/mach</independentVar>
                        <tableData>
                            0.0000        0.1200
                            1.0000        0.100
                        </tableData>
                    </table>
                    <!-- Asymmetric stall -->
                    <table>
                        <independentVar lookup="row">aero/alpha-deg</independentVar>
                        <tableData>
                        -35    0.3
                        -9     0.3
                        -8     1
                        10     1
                        11     0.3
                        35     0.3
                        </tableData>
                    </table>
                 </product>
            </function>

            <function name="aero/coefficient/Cldr">
                <description>Roll_moment_due_to_rudder</description>
                <product>
                    <property>aero/thrust-qbar_psf</property>
                    <property>metrics/Sw-sqft</property>
                    <property>metrics/bw-ft</property>
                    <property>fcs/rudder-pos-rad</property>
                    <value>0.003</value>
                </product>
            </function>

           <!--
               Create roll moment with a tendancy
               to drop the left wing at stall.
               This will help to induce a spin.

               The positive value at aero/alpha-deg = 10.35
               is to simulate actual behavior.  The NACA
               test report on stall behavior says that
               initially it will drop the right wing and then
               roll to the left as the stall deepens.
            -->
           <function name="aero/coefficient/Clalpha">
                <description>roll_moment_due_to_alpha</description>
                <product>
                    <property>aero/qbar-psf</property>
                    <property>metrics/Sw-sqft</property>
                    <property>metrics/bw-ft</property>
                    <table>
                        <independentVar lookup="row">aero/alpha-deg</independentVar>
                        <independentVar lookup="column">aero/Re</independentVar>
                        <tableData>
                                          2500000  5000000  10000000   20000000
                               -33.0      0.0     -0.005   -0.0025    -0.000025
                                -9.0      0.0     -0.00025 -0.000125  -0.00000125
                                 0.0      0.0      0.0      0.0        0.0
                                14        0.0      0.0      0.0        0.0
                                14.15     0.0      0.0025   0.00125    0.00000125
                                14.3      0.0     -0.00025 -0.000125  -0.000000125
                                34.5      0.0     -0.0005  -0.00025   -0.00000025
                        </tableData>
                    </table>
                    <table>
                        <independentVar lookup="row">/gear/gear[0]/wow</independentVar>
                        <independentVar lookup="column">/gear/gear[1]/wow</independentVar>
                        <tableData>
                                0   1
                            0   1   0
                            1   0   0
                        </tableData>
                    </table>
                </product>
            </function>
        </axis>

        <axis name="PITCH">

            <!-- make it nose heavy when gear and/or flaps are extended -->

            <function name="aero/coefficient/Cmflap">
                <description>Pitch_moment_due_to_flaps</description>
                <product>
                    <property>aero/thrust-qbar_psf</property>
                    <property>metrics/Sw-sqft</property>
                    <property>metrics/cbarw-ft</property>
                    <property>fcs/flap-pos-norm</property>
                    <value>-0.0250</value>
                </product>
            </function>

            <function name="aero/coefficient/Cmgear">
                <description>Pitch_moment_due_to_gear</description>
                <product>
                    <property>aero/thrust-qbar_psf</property>
                    <property>metrics/Sw-sqft</property>
                    <property>metrics/cbarw-ft</property>
                    <property>gear/gear-pos-norm</property>
                    <value>-0.0070</value>
                </product>
            </function>

            <function name="aero/coefficient/Cmalpha-wing">
                <description>Pitch_moment_due_to_alpha</description>
                  <product>
                      <property>aero/qbar-psf</property>
                      <property>metrics/Sw-sqft</property>
                      <property>metrics/cbarw-ft</property>
                      <!--
                          actual data from http://www.worldofkrauss.com/foils/getpolar/1085.dat
                          from -15 to 15 degrees - other data is extrapolated.
                          Data has been hand smoothed.
                      -->
                      <table>
                        <independentVar lookup="row">aero/alpha-deg</independentVar>
                        <tableData>
                          -90.0        0.58700
                          -80.0        0.51700
                          -40.0        0.23700
                          -14.5        0.05800
                          -12.5        0.04500
                          -10.5        0.03200
                          -8.5         0.01800
                          -6.5         0.00500
                          -4.5        -0.00800
                          -2.5        -0.02150
                          -0.5        -0.03500
                          1.5         -0.04600
                          3.5         -0.05700
                          5.5         -0.06750
                          7.5         -0.07900
                          9.5         -0.09700
                          11.5        -0.13000
                          13.5        -0.14400
                          16.0        -0.15000
                          20.0        -0.19000
                          60.0        -0.46300
                          90.0        -0.67300
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                      </tableData>
                    </table>
                </product>
            </function>

            <!--<function name="aero/coefficient/Cmbuffet-and-stall">
                <description>Pitch_moment_due_to_stall-buffet</description>
                <product>
                    <property>aero/qbar-psf</property>
                    <property>metrics/Sw-sqft</property>
                    <property>metrics/cbarw-ft</property>
                    <sum>
                        <property>systems/alpha_buffet/sine_wave</property>
                        <product>
                          <value>0.005</value>
                          <property>systems/alpha_buffet/strength</property>
                        </product>
                    </sum>
                    <property>systems/alpha_buffet/strength</property>
                    <value>1.0</value>
                </product>
            </function>-->

            <function name="aero/coefficient/Cm-mach-porpoise">
                <description>Pitch_moment_due_mach_porpoise</description>
                <product>
                    <property>/fdm/jsbsim/systems/compressibility/enabled</property>
                    <property>aero/qbar-psf</property>
                    <property>metrics/Sw-sqft</property>
                    <property>metrics/cbarw-ft</property>
                    <property>/fdm/jsbsim/systems/compressibility/sine_wave</property>
                    <property>/fdm/jsbsim/systems/compressibility/strength</property>
                    <value>0.1</value>
                </product>
            </function>

            <function name="aero/coefficient/Cm-mach-tuck">
                <description>Pitch_moment_due_mach</description>
                <product>
                    <property>/fdm/jsbsim/systems/compressibility/enabled</property>
                    <property>aero/qbar-psf</property>
                    <property>metrics/Sw-sqft</property>
                    <property>metrics/cbarw-ft</property>
                    <table>  <!-- control reversal -->
                        <independentVar>/fdm/jsbsim/velocities/mach</independentVar>
                        <tableData>
                            0.0000        0.0
                            0.746         0.0
                            0.775         -0.05
                            1.0000        -0.2
                        </tableData>
                    </table>
                </product>
            </function>

            <function name="aero/coefficient/Cmde">
                <description>Pitch_moment_due_to_elevator</description>
                <product>
                    <property>aero/thrust-qbar_psf</property>
                    <property>metrics/Sw-sqft</property>
                    <property>metrics/cbarw-ft</property>
                    <property>fcs/elevator-pos-rad</property>
                    <!-- Lowered elevator angle from 0.78 rad (~ 45 deg) to 30 deg -->
                    <value>0.6712804815</value><!-- 30.0 / rad2deg(0.78)  -->
                    <table>
                        <independentVar>/fdm/jsbsim/velocities/mach</independentVar>
                        <tableData>
                            0.0000        -0.90000
                            0.66          -.6
                            0.74          -0.4
                            1.0000        -0.05
                        </tableData>
                    </table>
                </product>
            </function>

            <function name="aero/coefficient/Cmq">
                <description>Pitch_moment_due_to_pitch_rate</description>
                <product>
                    <property>aero/qbar-psf</property>
                    <property>metrics/Sw-sqft</property>
                    <property>metrics/cbarw-ft</property>
                    <property>aero/ci2vel</property>
                    <property>velocities/q-aero-rad_sec</property>
                    <value>-10.0000</value>
                </product>
            </function>

            <function name="aero/coefficient/Cmht">
                <description>Pitch_moment_due_to_alpha_horiz_tail</description>
                <product>
                    <property>aero/thrust-qbar_psf</property>
                    <property>metrics/Sh-sqft</property>
                    <property>metrics/lh-ft</property>
					<property>aero/pitch-moment-damping-factor</property>
                    <value> -0.6 </value>
                    <table>
                      <independentVar lookup="row">aero/alpha-deg</independentVar>
                      <tableData>
                          -178.25     0.0000
                          -168.25     0.7800
                          -138.25     0.8900
                          -108.25     0.5000
                          -78.25      -0.3650
                          -48.25      -1.0900
                          -18.25      -0.6800
                          -15.25      -0.6000
                          -12.25      -0.7800
                          -9.25       -1.0000
                          -6.25       -0.8700
                          -3.25       -0.6000
                          -0.25       -0.2600
                          3.25        0.13
                          7.75        0.5
                          12.25       0.79
                          16.75       1
                          21.4375     0.68
                          24.25       0.62
                          35.5        0.92
                          63.625      0.89
                          91.75       0.05
                          121.75      -0.74
                          151.75      -0.62
                          181.75      0
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                      </tableData>
                  </table>
                </product>
            </function>

        </axis>

        <axis name="YAW">
            <function name="aero/coefficient/Cnb">
                <description>Yaw_moment_due_to_beta</description>
                <product>
                    <property>aero/thrust-qbar_psf</property>
                    <property>metrics/Sw-sqft</property>
                    <property>metrics/bw-ft</property>
                    <property>aero/beta-rad</property>
                    <value>0.1200</value>
                </product>
            </function>

            <function name="aero/coefficient/Cnspw">
                <description>Yaw_moment_due_to_spiraling_propwash</description>
                <product>
                    <property>metrics/Sw-sqft</property>
                    <property>metrics/bw-ft</property>
                    <property>propulsion/engine/thrust-lbs</property>
                    <value>-0.00006</value>
                    <table>
                        <independentVar lookup="row">/velocities/airspeed-kt</independentVar>
                        <tableData>
                            0    1
                            140  1
                            190  0
                        </tableData>
                    </table>
                </product>
            </function>

            <function name="aero/coefficient/Cnr">
                <description>Yaw_moment_due_to_yaw_rate</description>
                <product>
                    <property>aero/qbar-psf</property>
                    <property>metrics/Sw-sqft</property>
                    <property>metrics/bw-ft</property>
                    <property>aero/bi2vel</property>
                    <property>velocities/r-aero-rad_sec</property>
                    <value>-0.1500</value>
                </product>
            </function>

            <function name="aero/coefficient/Cndr">
                <description>Yaw_moment_due_to_rudder</description>
                <product>
                    <property>aero/thrust-qbar_psf</property>
                    <property>metrics/Sw-sqft</property>
                    <property>metrics/bw-ft</property>
                    <property>fcs/rudder-pos-rad</property>
                    <value>-0.1000</value>
                </product>
            </function>

            <function name="aero/coefficient/Cnda">
                <description>Adverse_yaw</description>
                <product>
                    <property>aero/qbar-psf</property>
                    <property>metrics/Sw-sqft</property>
                    <property>metrics/bw-ft</property>
                    <property>fcs/left-aileron-pos-rad</property>
                    <value>-0.0030</value>
                    <!-- Lowered aileron angle from 0.35 rad (~ 20 deg) to 15 deg -->
                    <value>1.336901522</value><!-- = 0.35 / deg2rad(15 deg) -->
                </product>
            </function>

            <!--
               Create YAW to help drop a wing at stall.
               This will help to induce a spin or a snap
               roll depending on how fast the stall entry
               speed is.
               Which wing is dropped and how hard it
               drops depends on the beta angle.
            -->

           <function name="aero/coefficient/Cnalphabeta">
                <description>Yaw_moment_due_to_alpha-beta</description>
                <product>
                    <value> -1.0 </value>
                    <property>aero/qbar-psf</property>
                    <property>metrics/Sw-sqft</property>
                    <property>metrics/bw-ft</property>
                    <table>
                        <independentVar lookup="row">aero/alpha-deg</independentVar>
                        <independentVar lookup="column">aero/beta-deg</independentVar>
                        <independentVar lookup="table">aero/Re</independentVar>
                        <tableData breakPoint="2500000">
                                     -30     -5      -2      2.5       6      32
                               -14.5  0.0  0.05      0.03    -0.03     -0.05    0.0
                               -10.0  0.0  0.05      0.03    -0.03     -0.05    0.0
                                -9.5  0.0  0.05      0.03    -0.03     -0.05    0.0
                                -9.0  0.0  0.05      0.03    -0.03     -0.05    0.0
                                -8.5  0.0  0.05      0.03    -0.03     -0.05    0.0
                                -8.0  0.0  0.05      0.03    -0.03     -0.05    0.0
                                -7.0  0.0  0.0       0.0      0.0      0.0      0.0
                                 0.0  0.0  0.0       0.0      0.0      0.0      0.0
                                10.0  0.0  0.0       0.0      0.0      0.0      0.0
                                10.6  0.0  0.001     0.005   -0.005   -0.001    0.0
                                11.2  0.0  0.0015    0.006   -0.006   -0.0015   0.0
                                11.5  0.0  0.0025    0.008   -0.008   -0.0025   0.0
                                12.0  0.0  0.0035    0.01    -0.01    -0.0035   0.0
                                12.2  0.0  0.005     0.012   -0.012   -0.005    0.0
                                12.5  0.0  0.00625   0.013   -0.013   -0.00625  0.0
                                14.5  0.0  0.0075    0.015   -0.015   -0.0075   0.0
                                25.0  0.0  0.00125   0.005   -0.005   -0.00125  0.0
                        </tableData>
                        <tableData breakPoint="5000000">
                                     -30    -5       -2        2.5          6          32
                               -14.5 0.0  0.05      0.03      -0.03       -0.05        0.0
                               -10.0 0.0  0.05      0.03      -0.03       -0.05        0.0
                                -9.5 0.0  0.05      0.03      -0.03       -0.05        0.0
                                -9.0 0.0  0.05      0.03      -0.03       -0.05        0.0
                                -8.5 0.0  0.05      0.03      -0.03       -0.05        0.0
                                -8.0 0.0  0.005     0.003     -0.003      -0.005       0.0
                                -7.0 0.0  0.0       0.0        0.0         0.0         0.0
                                 0.0 0.0  0.0       0.0        0.0         0.0         0.0
                                10.0 0.0  0.0       0.0        0.0         0.0         0.0
                                10.6 0.0  0.005     0.01      -0.01       -0.005       0.0
                                11.2 0.0  0.015     0.01      -0.01       -0.015       0.0
                                11.5 0.0  0.02      0.015     -0.015      -0.02        0.0
                                12.0 0.0  0.025     0.02      -0.02       -0.025       0.0
                                12.2 0.0  0.03      0.023     -0.023      -0.03        0.0
                                12.5 0.0  0.04      0.026     -0.026      -0.04        0.0
                                14.5 0.0  0.05      0.03      -0.03       -0.05        0.0
                                25.0 0.0  0.02      0.01      -0.01       -0.02        0.0
                        </tableData>
                        <tableData breakPoint="10000000">
                                        -30    -5      -2      2.5         6         32
                               -14.5    0.0  0.05     0.03    -0.03      -0.05       0.0
                               -10.0    0.0  0.05     0.03    -0.03      -0.05       0.0
                                -9.5    0.0  0.05     0.03    -0.03      -0.05       0.0
                                -9.0    0.0  0.05     0.03    -0.03      -0.05       0.0
                                -8.5    0.0  0.02     0.01    -0.01      -0.02       0.0
                                -8.0    0.0  0.005    0.003   -0.003     -0.005      0.0
                                -7.0    0.0  0.0      0.0      0.0        0.0        0.0
                                 0.0    0.0  0.0      0.0      0.0        0.0        0.0
                                10.0    0.0  0.0      0.0      0.0        0.0        0.0
                                10.6    0.0  0.002    0.006   -0.006     -0.002      0.0
                                11.2    0.0  0.005    0.005   -0.005     -0.005      0.0
                                11.5    0.0  0.01     0.01    -0.01      -0.01       0.0
                                12.0    0.0  0.015    0.015   -0.015     -0.015      0.0
                                12.2    0.0  0.03     0.02    -0.02      -0.03       0.0
                                12.5    0.0  0.035    0.025   -0.025     -0.035      0.0
                                14.5    0.0  0.04     0.03    -0.03      -0.04       0.0
                                25.0    0.0  0.02     0.01    -0.01      -0.02       0.0
                        </tableData>
                        <tableData breakPoint="20000000">
                                        -30    -5        -2       2.5       6        32
                               -14.5    0.0    0.05     0.03    -0.03     -0.05      0.0
                               -10.0    0.0    0.05     0.03    -0.03     -0.05      0.0
                                -9.5    0.0    0.05     0.03    -0.03     -0.05      0.0
                                -9.0    0.0    0.02     0.01    -0.01     -0.02      0.0
                                -8.5    0.0    0.005    0.003   -0.003    -0.005     0.0
                                -8.0    0.0    0.002    0.001   -0.001    -0.002     0.0
                                -7.0    0.0    0.0      0.0      0.0       0.0       0.0
                                 0.0    0.0    0.0      0.0      0.0       0.0       0.0
                                10.0    0.0    0.0      0.0      0.0       0.0       0.0
                                10.6    0.0    0.0      0.0      0.0       0.0       0.0
                                11.2    0.0    0.0      0.0      0.0       0.0       0.0
                                11.5    0.0    0.0      0.0      0.0       0.0       0.0
                                12.0    0.0    0.01     0.01    -0.01     -0.01      0.0
                                12.2    0.0    0.02     0.016   -0.016    -0.02      0.0
                                12.5    0.0    0.03     0.023   -0.023    -0.03      0.0
                                14.5    0.0    0.05     0.03    -0.03     -0.05      0.0
                                25.0    0.0    0.02     0.01    -0.01     -0.02      0.0
                        </tableData>
                        <tableData breakPoint="30000000">
                                       -30     -5          -2      2.5     6       32
                               -14.5   0.0    0.05       0.03    -0.03   -0.05     0.0
                               -10.0   0.0    0.05       0.03    -0.03   -0.05     0.0
                                -9.5   0.0    0.02       0.01    -0.01   -0.02     0.0
                                -9.0   0.0    0.005      0.003   -0.003  -0.005    0.0
                                -8.5   0.0    0.002      0.001   -0.001  -0.002    0.0
                                -8.0   0.0    0.0        0.0      0.0     0.0      0.0
                                -7.0   0.0    0.0        0.0      0.0     0.0      0.0
                                 0.0   0.0    0.0        0.0      0.0     0.0      0.0
                                10.0   0.0    0.0        0.0      0.0     0.0      0.0
                                10.6   0.0    0.0        0.0      0.0     0.0      0.0
                                11.2   0.0    0.0        0.0      0.0     0.0      0.0
                                11.5   0.0    0.0        0.0      0.0     0.0      0.0
                                12.0   0.0    0.0        0.0      0.0     0.0      0.0
                                12.2   0.0    0.01       0.01    -0.01   -0.01     0.0
                                12.5   0.0    0.03       0.02    -0.02   -0.03     0.0
                                14.5   0.0    0.05       0.03    -0.03   -0.05     0.0
                                25.0   0.0    0.02       0.01    -0.01   -0.02     0.0
                        </tableData>
                        <tableData breakPoint="40000000">
                                         -30     -5       -2       2.5       6      32
                               -14.5     0.0    0.05     0.03    -0.03     -0.05    0.0
                               -10.0     0.0    0.05     0.03    -0.03     -0.05    0.0
                                -9.5     0.0    0.02     0.01    -0.01     -0.02    0.0
                                -9.0     0.0    0.005    0.003   -0.003    -0.005   0.0
                                -8.5     0.0    0.002    0.001   -0.001    -0.002   0.0
                                -8.0     0.0    0.0      0.0      0.0       0.0     0.0
                                -7.0     0.0    0.0      0.0      0.0       0.0     0.0
                                 0.0     0.0    0.0      0.0      0.0       0.0     0.0
                                10.0     0.0    0.0      0.0      0.0       0.0     0.0
                                10.6     0.0    0.0      0.0      0.0       0.0     0.0
                                11.2     0.0    0.0      0.0      0.0       0.0     0.0
                                11.5     0.0    0.0      0.0      0.0       0.0     0.0
                                12.0     0.0    0.0      0.0      0.0       0.0     0.0
                                12.2     0.0    0.0      0.0      0.0       0.0     0.0
                                12.5     0.0    0.03     0.02    -0.02     -0.03    0.0
                                14.5     0.0    0.05     0.03    -0.03     -0.05    0.0
                                25.0     0.0    0.02     0.01    -0.01     -0.02    0.0
                        </tableData>
                    </table>
                </product>
            </function>
        </axis>
    </aerodynamics>

</fdm_config>
